!--- OpenDSS Linecodes file generated from Show LINECONSTANTS command
!--- Frequency = 60 Hz, Earth resistivity = 100 ohm-m
!--- Earth Model = Carson

New Linecode.bundle nphases=3  Units=kft
~ Rmatrix=[0.0796897  |0.0175634  0.0796897  |0.0175648  0.0175648  0.0796886  ]
~ Xmatrix=[0.0432913  |-0.00473439  0.0432913  |-0.00473245  -0.00473245  0.0432893  ]
~ Cmatrix=[49.1658  |0  49.1658  |0  0  49.1658  ]
